<?xml version="1.0"?>
<Node name="root" gravity="0 0 0" dt="0.01" >
    <Node name="RequiredPlugins">
        <RequiredPlugin pluginName="Sofa.Component.Collision.Geometry"/> <!-- Needed to use components [LineCollisionModel,PointCollisionModel] -->
        <RequiredPlugin pluginName="Sofa.Component.Constraint.Lagrangian.Correction"/> <!-- Needed to use components [LinearSolverConstraintCorrection] -->
        <RequiredPlugin pluginName="Sofa.Component.IO.Mesh"/> <!-- Needed to use components [MeshOBJLoader] -->
        <RequiredPlugin pluginName="Sofa.Component.LinearSolver.Direct"/> <!-- Needed to use components [SparseLDLSolver] -->
        <RequiredPlugin pluginName="Sofa.Component.Mapping.NonLinear"/> <!-- Needed to use components [RigidMapping] -->
        <RequiredPlugin pluginName="Sofa.Component.Mass"/> <!-- Needed to use components [UniformMass] -->
        <RequiredPlugin pluginName="Sofa.Component.ODESolver.Backward"/> <!-- Needed to use components [EulerImplicitSolver] -->
        <RequiredPlugin pluginName="Sofa.Component.SceneUtility"/> <!-- Needed to use components [InfoComponent] -->
        <RequiredPlugin pluginName="Sofa.Component.SolidMechanics.Spring"/> <!-- Needed to use components [RestShapeSpringsForceField] -->
        <RequiredPlugin pluginName="Sofa.Component.StateContainer"/> <!-- Needed to use components [MechanicalObject] -->
        <RequiredPlugin pluginName="Sofa.Component.Topology.Container.Constant"/> <!-- Needed to use components [MeshTopology] -->
        <RequiredPlugin pluginName="Sofa.Component.Visual"/> <!-- Needed to use components [VisualStyle] -->
        <RequiredPlugin pluginName="Sofa.GL.Component.Rendering3D"/> <!-- Needed to use components [OglModel] -->
        <RequiredPlugin pluginName="SofaHaplyRobotics"/>
    </Node>

	<VisualStyle displayFlags="showVisualModels showBehaviorModels hideCollisionModels hideBoundingCollisionModels hideMappings hideMechanicalMappings hideForceFields hideInteractionForceFields hideWireframe hideNormals" />

    <DefaultAnimationLoop />
    <DefaultVisualManagerLoop />

    <Haply_Inverse3Controller name="Device" scale="20.0" drawDebug="1" printLog="0"/>
    <MechanicalObject template="Rigid3d" name="HaplyMO" position="@Device.positionDevice" />

	<Node name="Instrument" >
        <EulerImplicitSolver name="ODE solver" rayleighStiffness="0.01" rayleighMass="0.01" />
        <SparseLDLSolver template="CompressedRowSparseMatrixd"/>

		<MechanicalObject name="instrumentState" template="Rigid3" />
		<UniformMass name="mass" totalMass="1" />

		<RestShapeSpringsForceField stiffness='1000000' angularStiffness='1000000' external_rest_shape='@../HaplyMO' points='0' external_points='0'/>
        <LinearSolverConstraintCorrection />

        <Node name="VisuTool" >
            <MeshOBJLoader name="meshLoader_1" filename="./mesh/dental_instrument.obj" handleSeams="1"
                rotation="-90 -90 0" translation="0 -3.5 0.3"/>
            <OglModel name="InstrumentVisualModel" src="@meshLoader_1" color="1.0 0.2 0.2 1.0" />
            <RigidMapping name="MM->VM mapping" input="@instrumentState" output="@InstrumentVisualModel" />
        </Node>

        <Node name="CollisionModel" >
            <MeshOBJLoader name="loader" filename="./mesh/dental_instrument_centerline.obj"
                rotation="@../VisuTool/meshLoader_1.rotation" translation="@../VisuTool/meshLoader_1.translation"/>
            <MeshTopology src="@loader" name="InstrumentCollisionModel" />
            <MechanicalObject src="@loader" name="instrumentCollisionState" />
            <LineCollisionModel />
            <PointCollisionModel />
            <RigidMapping name="MM->CM mapping" input="@instrumentState" output="@instrumentCollisionState" />
        </Node>
    </Node>
</Node>
