<?xml version="1.0" ?>
<Node name="root" dt="0.01" gravity="0 0 -4" >
    <Node name="RequiredPlugins">
        <RequiredPlugin pluginName="Sofa.Component.AnimationLoop"/> <!-- Needed to use components [FreeMotionAnimationLoop] -->
        <RequiredPlugin pluginName="Sofa.Component.Collision.Detection.Algorithm"/> <!-- Needed to use components [BVHNarrowPhase,BruteForceBroadPhase,CollisionPipeline] -->
        <RequiredPlugin pluginName="Sofa.Component.Collision.Detection.Intersection"/> <!-- Needed to use components [LocalMinDistance] -->
        <RequiredPlugin pluginName="Sofa.Component.Collision.Geometry"/> <!-- Needed to use components [LineCollisionModel,PointCollisionModel,TriangleCollisionModel] -->
        <RequiredPlugin pluginName="Sofa.Component.Collision.Response.Contact"/> <!-- Needed to use components [CollisionResponse] -->
        <RequiredPlugin pluginName="Sofa.Component.Constraint.Lagrangian.Correction"/> <!-- Needed to use components [LinearSolverConstraintCorrection,PrecomputedConstraintCorrection] -->
        <RequiredPlugin pluginName="Sofa.Component.Constraint.Lagrangian.Solver"/> <!-- Needed to use components [LCPConstraintSolver] -->
        <RequiredPlugin pluginName="Sofa.Component.Haptics"/> <!-- Needed to use components [LCPForceFeedback] -->
        <RequiredPlugin pluginName="Sofa.Component.IO.Mesh"/> <!-- Needed to use components [MeshGmshLoader,MeshOBJLoader] -->
        <RequiredPlugin pluginName="Sofa.Component.LinearSolver.Direct"/> <!-- Needed to use components [SparseLDLSolver] -->
        <RequiredPlugin pluginName="Sofa.Component.LinearSolver.Iterative"/> <!-- Needed to use components [CGLinearSolver] -->
        <RequiredPlugin pluginName="Sofa.Component.Mapping.Linear"/> <!-- Needed to use components [IdentityMapping] -->
        <RequiredPlugin pluginName="Sofa.Component.Mapping.NonLinear"/> <!-- Needed to use components [RigidMapping] -->
        <RequiredPlugin pluginName="Sofa.Component.Mass"/> <!-- Needed to use components [DiagonalMass,UniformMass] -->
        <RequiredPlugin pluginName="Sofa.Component.MechanicalLoad"/> <!-- Needed to use components [PlaneForceField] -->
        <RequiredPlugin pluginName="Sofa.Component.IntegrationScheme.Backward"/> <!-- Needed to use components [EulerImplicitIntegrationScheme] -->
        <RequiredPlugin pluginName="Sofa.Component.SceneUtility"/> <!-- Needed to use components [InfoComponent] -->
        <RequiredPlugin pluginName="Sofa.Component.SolidMechanics.FEM.Elastic"/> <!-- Needed to use components [TetrahedronFEMForceField] -->
        <RequiredPlugin pluginName="Sofa.Component.SolidMechanics.Spring"/> <!-- Needed to use components [RestShapeSpringsForceField] -->
        <RequiredPlugin pluginName="Sofa.Component.StateContainer"/> <!-- Needed to use components [MechanicalObject] -->
        <RequiredPlugin pluginName="Sofa.Component.Topology.Container.Constant"/> <!-- Needed to use components [MeshTopology] -->
        <RequiredPlugin pluginName="Sofa.Component.Topology.Container.Dynamic"/> <!-- Needed to use components [TetrahedronSetGeometryAlgorithms,TetrahedronSetTopologyContainer,TetrahedronSetTopologyModifier,TriangleSetGeometryAlgorithms,TriangleSetTopologyContainer,TriangleSetTopologyModifier] -->
        <RequiredPlugin pluginName="Sofa.Component.Topology.Mapping"/> <!-- Needed to use components [Tetra2TriangleTopologicalMapping] -->
        <RequiredPlugin pluginName="Sofa.Component.Visual"/> <!-- Needed to use components [VisualStyle] -->
        <RequiredPlugin pluginName="Sofa.GL.Component.Rendering3D"/> <!-- Needed to use components [OglModel] -->
        <RequiredPlugin pluginName="SofaHaplyRobotics"/>
    </Node>

    <VisualStyle displayFlags="hideBehaviorModels hideCollisionModels hideMappings hideForceFields" />

    <FreeMotionAnimationLoop/>
    <LCPConstraintSolver tolerance="0.001" maxIt="1000"/>

    <CollisionPipeline name="pipeline" depth="6" verbose="0"/>
    <BruteForceBroadPhase/>
    <BVHNarrowPhase/>
    <CollisionResponse name="response" response="FrictionContactConstraint" />
    <LocalMinDistance name="proximity" alarmDistance="0.2" contactDistance="0.1" angleCone="0.1" />

    <Haply_Inverse3Controller name="Device" scale="60.0" drawDebug="0" positionBase="0 6 -4" orientationBase="0 0 -0.7071068 0.7071068 " damping="0.001" printLog="1"/>
    <MechanicalObject template="Rigid3d" name="HaplyMO" position="@Device.positionDevice" />

    <Node name="Instrument" >
        <EulerImplicitIntegrationScheme name="ODE solver" rayleighStiffness="0.01" rayleighMass="0.1" />
        <SparseLDLSolver template="CompressedRowSparseMatrixMat3x3d"/>

		<MechanicalObject name="instrumentState" template="Rigid3" />
		<UniformMass name="mass" totalMass="1.0" />

		<RestShapeSpringsForceField stiffness='1000000' angularStiffness='1000000' external_rest_shape='@../HaplyMO' points='0' external_points='0'/>
        <LCPForceFeedback name="LCPFF1" activate="true" forceCoef="0.0005" />
        <LinearSolverConstraintCorrection />

		<Node name="VisuTool" >
            <MeshOBJLoader name="meshLoader_1" filename="./mesh/dental_instrument.obj" handleSeams="1"
                rotation="-90 -90 0" translation="0 -3.5 0.3"/>
            <OglModel name="InstrumentVisualModel" src="@meshLoader_1" color="1.0 0.2 0.2 1.0" />
            <RigidMapping name="MM->VM mapping" input="@instrumentState" output="@InstrumentVisualModel" />
        </Node>

        <Node name="CollisionModel" >
            <MeshOBJLoader name="loader" filename="./mesh/dental_instrument_centerline.obj"
                rotation="@../VisuTool/meshLoader_1.rotation" translation="@../VisuTool/meshLoader_1.translation"/>
            <MeshTopology src="@loader" name="InstrumentCollisionModel" />
            <MechanicalObject src="@loader" name="instrumentCollisionState" />
            <LineCollisionModel />
            <PointCollisionModel />
            <RigidMapping name="MM->CM mapping" input="@instrumentState" output="@instrumentCollisionState" />
        </Node>
    </Node>


    <Node name="Liver">
        <EulerImplicitIntegrationScheme name="ODE solver" rayleighStiffness="0.1" rayleighMass="0.1" />
        <CGLinearSolver name="linear_solver" iterations="25" tolerance="1e-10" threshold="10e-10" />

        <MeshGmshLoader filename="./mesh/liver2.msh" name="meshLoader" scale3d="6 6 6" rotation="0 20 0" translation="0  0 -2.1"/>
        <MechanicalObject name="dofs" src="@meshLoader" />
		<TetrahedronSetTopologyContainer name="TetraContainer" src="@meshLoader" />
        <TetrahedronSetTopologyModifier name="Modifier" />
        <TetrahedronSetGeometryAlgorithms template="Vec3d" name="GeomAlgo" drawTetrahedra="0" />

        <TetrahedronFEMForceField name="FEM" youngModulus="60000" poissonRatio="0.45" method="large" />
        <DiagonalMass massDensity="300.0" topology="@TetraContainer" geometryState="@dofs"/>

        <PlaneForceField normal="0 0 1" d="-5" stiffness="100000" showPlane="1" showPlaneSize="20"/>
        <!--<UncoupledConstraintCorrection useOdeSolverIntegrationFactors="0"/>-->
        <!--<PrecomputedConstraintCorrection recompute="0" printLog="1" fileCompliance="./Liver-1521-0.01.comp"/>-->
        <PrecomputedConstraintCorrection recompute="0" printLog="0" fileCompliance="./Liver-1521-0.01.comp" />
        <Node name="Surface">
			<TriangleSetTopologyContainer  name="TriContainer1" fileTopology="" tags=" " />
			<TriangleSetTopologyModifier   name="TriModifier1" />
			<TriangleSetGeometryAlgorithms name="TriGeomAlgo1" template="Vec3d" />
            <Tetra2TriangleTopologicalMapping input="@../TetraContainer" output="@TriContainer1"/>
            <TriangleCollisionModel />
            <LineCollisionModel />
            <PointCollisionModel />
            <Node name="Visu1">
                <OglModel name="Visual" texturename="textures/colorMap.png" />
                <IdentityMapping input="@../" output="@Visual" />
            </Node>
        </Node>
    </Node>


   <Node name="Floor">
        <MeshOBJLoader name="loaderF" filename="./mesh/cube.obj" scale3d="20 0.5 20" translation="0 0 -5.5" rotation="90 0 0"/>
        <MeshTopology src="@loaderF" />
        <MechanicalObject src="@loaderF" />
        <TriangleCollisionModel simulated="0" moving="0" bothSide="false" group="1"/>
        <LineCollisionModel simulated="0" moving="0" group="1" />
        <PointCollisionModel simulated="0" moving="0" group="1"/>
		<Node name="VisuFloor" >
            <OglModel name="FloorVisualModel"/>
            <IdentityMapping input="@../" output="@FloorVisualModel" />
        </Node>
    </Node>

</Node>
